<?xml version="1.0"?>
<!--
     Inputs:
       horsepower:   750.96
       pitch:        variable

     Outputs:
       linear-blade-inches: 145.23934177763

     NAS druhy pokus o vrtuli
-->

<propeller name="prop">
  <ixx>        2.8432943206787 </ixx>
  <diameter unit="IN">   99 </diameter>
  <numblades>  3 </numblades>
  <minpitch>   15 </minpitch>
  <maxpitch>   83  </maxpitch>
  <reversepitch> -18 </reversepitch>
  <minrpm>    1600 </minrpm>
  <maxrpm>    2080 </maxrpm>
  <table name="C_THRUST" type="internal">
    <tableData>
        -20	-10	-5	0	5	10	15	20	25	30	35	40	45	50	55	60	83
      0	-0.0320	-0.0160	-0.0010	0.0140	0.0368	0.0680	0.1000	0.1360	0.1460	0.1360	0.1160	0.0960	0.0700	0.0620	0.0600	0.0480	0.0010
      0.2	-0.0380	-0.0260	-0.0160	-0.0020	0.0200	0.0500	0.0840	0.1180	0.1440	0.1408	0.1264	0.1120	0.0880	0.0772	0.0732	0.0560	0.0010
      0.4	-0.0420	-0.0360	-0.0300	-0.0220	-0.0004	0.0260	0.0600	0.0960	0.1320	0.1480	0.1370	0.1260	0.1040	0.0920	0.0860	0.0660	0.0010
      0.6	-0.0560	-0.0540	-0.0520	-0.0440	-0.0300	-0.0020	0.0320	0.0680	0.1060	0.1408	0.1404	0.1400	0.1200	0.1064	0.0980	0.0760	0.0010
      0.8	-0.0688	-0.0680	-0.0660	-0.0600	-0.0520	-0.0340	0.0000	0.0400	0.0800	0.1200	0.1360	0.1520	0.1360	0.1200	0.1112	0.0892	0.0010
      1	-0.0772	-0.0752	-0.0740	-0.0720	-0.0680	-0.0580	-0.0340	0.0076	0.0480	0.0920	0.1180	0.1440	0.1500	0.1348	0.1240	0.1020	0.0010
      1.2	-0.0920	-0.0880	-0.0840	-0.0820	-0.0800	-0.0740	-0.0600	-0.0320	0.0160	0.0600	0.0920	0.1240	0.1540	0.1488	0.1360	0.1140	0.0010
      1.4	-0.1060	-0.1020	-0.0980	-0.0920	-0.0892	-0.0860	-0.0764	-0.0592	-0.0200	0.0280	0.0646	0.1012	0.1460	0.1616	0.1480	0.1272	0.0010
      1.6	-0.1240	-0.1160	-0.1120	-0.1060	-0.1008	-0.0972	-0.0904	-0.0800	-0.0556	-0.0044	0.0342	0.0728	0.1240	0.1608	0.1600	0.1400	0.0010
      1.8	-0.1440	-0.1340	-0.1320	-0.1260	-0.1148	-0.1096	-0.1040	-0.0960	-0.0800	-0.0408	0.0016	0.0440	0.0960	0.1472	0.1708	0.1520	0.0010
      2	-0.1840	-0.1600	-0.1560	-0.1440	-0.1320	-0.1240	-0.1160	-0.1080	-0.0968	-0.0720	-0.0300	0.0120	0.0692	0.1240	0.1680	0.1640	0.0010
      2.2	-0.2400	-0.2080	-0.1920	-0.1600	-0.1548	-0.1416	-0.1312	-0.1228	-0.1116	-0.0920	-0.0568	-0.0216	0.0460	0.1012	0.1548	0.1760	0.0010
      2.4	-0.3200	-0.2720	-0.2400	-0.1880	-0.1840	-0.1640	-0.1488	-0.1380	-0.1256	-0.1100	-0.0784	-0.0468	0.0140	0.0768	0.1360	0.1868	0.0010
    </tableData>
  </table>

  <table name="C_POWER" type="internal">
    <tableData>
        -20	-10	-5	0	5	10	15	20	25	30	35	40	45	50	55	83
      0.0	0.0336	0.0113	0.0030	0.0044	0.0076	0.0150	0.0264	0.0400	0.0516	0.0640	0.0770	0.0904	0.1034	0.1166	0.1330	0.5
      0.2	0.0426	0.0138	0.0036	0.0040	0.0064	0.0130	0.0240	0.0390	0.0540	0.0654	0.0780	0.0920	0.1050	0.1184	0.1360	0.5
      0.4	0.0510	0.0160	0.0050	0.0036	0.0400	0.0094	0.0200	0.0358	0.0550	0.0694	0.0816	0.0944	0.1070	0.1220	0.1400	0.5
      0.6	0.0636	0.0250	0.0124	0.0040	0.0000	0.0030	0.0134	0.0292	0.0500	0.0740	0.0866	0.0980	0.1104	0.1270	0.1460	0.5
      0.8	0.0795	0.0388	0.0180	0.0066	-0.0020	-0.0046	0.0034	0.0200	0.0420	0.0688	0.0940	0.1060	0.1174	0.1334	0.1520	0.5
      1.0	0.0915	0.0483	0.0240	0.1060	-0.0016	-0.0100	-0.0090	0.0060	0.0290	0.0580	0.0904	0.1156	0.1276	0.1430	0.1630	0.5
      1.2	0.1035	0.0583	0.0324	0.0160	0.0010	-0.0114	-0.0184	-0.0116	0.0120	0.0424	0.0776	0.1174	0.1410	0.1540	0.1720	0.5
      1.4	0.1155	0.0683	0.0400	0.0224	0.0050	-0.0100	-0.0220	-0.0264	-0.0090	0.0240	0.0640	0.1090	0.1494	0.1670	0.1844	0.5
      1.6	0.1275	0.0783	0.0480	0.0300	0.0106	-0.0070	-0.0228	-0.0340	-0.0306	0.0000	0.0440	0.0934	0.1470	0.1820	0.2000	0.5
      1.8	0.1395	0.0883	0.0560	0.0360	0.0160	-0.0040	-0.0220	-0.0370	-0.0450	-0.0280	0.0180	0.0730	0.1320	0.1900	0.2160	0.5
      2.0	0.1515	0.0983	0.0640	0.0420	0.0220	-0.0010	-0.0208	-0.0380	-0.0520	-0.0516	-0.0120	0.0480	0.1140	0.1840	0.2346	0.5
      2.2	0.1635	0.1083	0.0720	0.0490	0.0280	0.0014	-0.0192	-0.0380	-0.0560	-0.0642	-0.0436	0.0200	0.0944	0.1680	0.2444	0.5
      2.4	0.1755	0.1183	0.0800	0.0560	0.0360	0.0080	-0.0178	-0.0380	-0.0590	-0.0740	-0.0690	-0.0156	0.0640	0.1492	0.2400	0.5
    </tableData>
  </table>
</propeller>
