<FDM_CONFIG NAME="L410UVPE" VERSION="1.65">
<!--
  File:     l410.xml
  Author:   Aero-Matic v 0.7

  Inputs:
    name:          l410
    type:          light twin
    max weight:    14112 lb
    wing span:     64.6357 ft
    length:        49.215 ft
    wing area:     376.775 sq-ft
    gear type:     tricycle
    retractable?:  yes
    # engines:     2
    engine type:   turboprop
    engine layout: wings
    yaw damper?    no

  Outputs:
    wing loading:  37.45 lb/sq-ft
    CL-alpha:      4.8 per radian
    CL-0:          0.24
    CL-max:        1.3
    CD-0:          0.025
    K:             0.041


   AC_CGLOC     235.3  0.0 0.0
   AC_AERORP    240.3  0.0  39.0
-->

 <METRICS>
   AC_WINGAREA  376.78
   AC_WINGSPAN  64.64
   AC_CHORD      7.00
   AC_HTAILAREA 103.00
   AC_HTAILARM  21.32
   AC_VTAILAREA 78.00
   AC_LV        23.00
   AC_IXX       60000
   AC_IYY       52000
   AC_IZZ       107845
   AC_IXZ       0
   AC_EMPTYWT   8467

   AC_CGLOC     235.3  0.0 0.0
   AC_AERORP    240.3  0.0  39.0
   AC_EYEPTLOC  100.4 -18.0 45.0
 </METRICS>
 <UNDERCARRIAGE>
  AC_GEAR NOSE_LG   105.0  0.0 -80.0 19756.8 1411.2  0.5  0.8  0.02 STEERABLE NOSE 45.0 RETRACT
  AC_GEAR LEFT_MLG  265.9 -69.8 -78.0 70560.0 2822.4  0.5  0.8  0.02 FIXED LEFT  0 RETRACT
  AC_GEAR RIGHT_MLG 265.9 69.8 -78.0 70560.0 2822.4  0.5  0.8  0.02 FIXED RIGHT 0 RETRACT
 </UNDERCARRIAGE>
 <PROPULSION>
  <AC_ENGINE FILE="engtm601">
    XLOC 203.0
    YLOC -129.2714
    ZLOC 19
    PITCH 0
    YAW 0
    FEED 0
  <AC_THRUSTER FILE="vrtule2">
      XLOC  163.0
      YLOC  -129.3
      ZLOC   19
      PITCH   0.0
      YAW     0
      P_FACTOR 10.0
      SENSE   1.0
    </AC_THRUSTER>
  </AC_ENGINE>
  <AC_ENGINE FILE="engtm601">
    XLOC 203.0
    YLOC 129.2714
    ZLOC 19
    PITCH 0
    YAW 0
    FEED 1
  <AC_THRUSTER FILE="vrtule2">
      XLOC  163.0
      YLOC  129.3
      ZLOC  19
      PITCH   0.0
      YAW     0
      P_FACTOR 10.0
      SENSE   1.0
    </AC_THRUSTER>
  </AC_ENGINE>
  <AC_TANK TYPE="FUEL" NUMBER="0">
    XLOC 295.29
    YLOC 8
    ZLOC -14.7645
    RADIUS 1
    CAPACITY    981.0
    CONTENTS    981.0
  </AC_TANK>
  <AC_TANK TYPE="FUEL" NUMBER="1">
    XLOC 295.29
    YLOC -8
    ZLOC -14.7645
    RADIUS 1
    CAPACITY    981.0
    CONTENTS    981.0
  </AC_TANK>
 </PROPULSION>

 <AERODYNAMICS>
  <AXIS NAME="LIFT">
    <COEFFICIENT NAME="CLalpha" TYPE="VECTOR">
      Lift_due_to_alpha
      4
      aero/alpha-rad
      aero/qbar-psf|metrics/Sw-sqft
      -0.20   -0.720
       0.00    0.240
       0.22    1.300
       0.60    0.664
    </COEFFICIENT>
    <COEFFICIENT NAME="dCLflap" TYPE="VALUE">
       Delta_Lift_due_to_flaps
       aero/qbar-psf|metrics/Sw-sqft|fcs/components/flaps-control/output-norm
       0.4
    </COEFFICIENT>
    <COEFFICIENT NAME="dCLsb" TYPE="VALUE">
       Delta_Lift_due_to_speedbrake
       aero/qbar-psf|metrics/Sw-sqft|fcs/speedbrake-pos-norm
       0
    </COEFFICIENT>
   <COEFFICIENT NAME="dCLsp" TYPE="VALUE">
       Delta_Lift_due_to_spoiler
       aero/qbar-psf|metrics/Sw-sqft|fcs/spoiler-pos-norm
       -0.05
    </COEFFICIENT>
    <COEFFICIENT NAME="CLde" TYPE="VALUE">
       Lift_due_to_Elevator_Deflection
       aero/qbar-psf|metrics/Sw-sqft|fcs/elevator-pos-rad
       0.2
    </COEFFICIENT>
  </AXIS>
  <AXIS NAME="DRAG">
    <COEFFICIENT NAME="CD0" TYPE="VECTOR">
       Drag_at_zero_lift
       5
       aero/alpha-rad
       aero/qbar-psf|metrics/Sw-sqft
       -1.57       1.500
       -0.26       0.050
        0.00       0.025
        0.26       0.050
        1.57       1.500
    </COEFFICIENT>
    <COEFFICIENT NAME="CDi" TYPE="VALUE">
       Induced_drag
       aero/qbar-psf|metrics/Sw-sqft|aero/cl-squared-norm
       0.041
    </COEFFICIENT>
    <COEFFICIENT NAME="CDmach" TYPE="VECTOR">
       Drag_due_to_mach
       4
       velocities/mach-norm
       aero/qbar-psf|metrics/Sw-sqft
       0.0       0.000
       0.72      0.000
       1.1       0.023
       1.8       0.015
    </COEFFICIENT>
    <COEFFICIENT NAME="CDflap" TYPE="VALUE">
       Drag_due_to_flaps
       aero/qbar-psf|metrics/Sw-sqft|fcs/components/flaps-control/output-norm
       0.039
    </COEFFICIENT>
    <COEFFICIENT NAME="CDgear" TYPE="VALUE">
       Drag_due_to_gear
       aero/qbar-psf|metrics/Sw-sqft|gear/gear-pos-norm
       0.03
    </COEFFICIENT>
    <COEFFICIENT NAME="CDsb" TYPE="VALUE">
       Drag_due_to_speedbrakes
       aero/qbar-psf|metrics/Sw-sqft|fcs/speedbrake-pos-norm
       0.025
    </COEFFICIENT>
    <COEFFICIENT NAME="CDsp" TYPE="VALUE">
       Drag_due_to_spoiler
       aero/qbar-psf|metrics/Sw-sqft|fcs/spoiler-pos-norm
       0.030
    </COEFFICIENT>
    <COEFFICIENT NAME="CDbeta" TYPE="VECTOR">
       Drag_due_to_sideslip
       5
       aero/beta-rad
       aero/qbar-psf|metrics/Sw-sqft
       -1.57       1.230
       -0.26       0.050
        0.00       0.00
        0.26       0.050
        1.57       1.230
    </COEFFICIENT>
    <COEFFICIENT NAME="CDde" TYPE="VALUE">
       Drag_due_to_Elevator_Deflection
       aero/qbar-psf|metrics/Sw-sqft|fcs/elevator-pos-norm
       0.039
    </COEFFICIENT>
  </AXIS>
  <AXIS NAME="SIDE">
    <COEFFICIENT NAME="CYb" TYPE="VALUE">
       Side_force_due_to_beta
       aero/qbar-psf|metrics/Sw-sqft|aero/beta-rad
<!--       -1
 -->
	-1.4
    </COEFFICIENT>
  </AXIS>
  <AXIS NAME="ROLL">
    <COEFFICIENT NAME="Clb" TYPE="VALUE">
       Roll_moment_due_to_beta
       aero/qbar-psf|metrics/Sw-sqft|metrics/bw-ft|aero/beta-rad
<!--          -0.4
 -->
          -0.4
    </COEFFICIENT>
    <COEFFICIENT NAME="Clp" TYPE="VALUE">
       Roll_moment_due_to_roll_rate
       aero/qbar-psf|metrics/Sw-sqft|metrics/bw-ft|aero/bi2vel|velocities/p-aero-rad_sec
<!--           -2.0
 -->
           -2.0
    </COEFFICIENT>
    <COEFFICIENT NAME="Clr" TYPE="VALUE">
       Roll_moment_due_to_yaw_rate
       aero/qbar-psf|metrics/Sw-sqft|metrics/bw-ft|aero/bi2vel|velocities/r-aero-rad_sec
<!--       0.15
 -->
       0.08
    </COEFFICIENT>
    <COEFFICIENT NAME="Clda" TYPE="VECTOR">
       Roll_moment_due_to_aileron
       2
       velocities/mach-norm
       aero/qbar-psf|metrics/Sw-sqft|metrics/bw-ft|fcs/left-aileron-pos-rad
<!--       0.0       0.12
       2.0       0.04
 -->
       0.0     0.16
       2.0     0.06

    </COEFFICIENT>
    <COEFFICIENT NAME="Cldr" TYPE="VALUE">
       Roll_moment_due_to_rudder
       aero/qbar-psf|metrics/Sw-sqft|metrics/bw-ft|fcs/rudder-pos-rad
       0.002
<!--       0.01
 -->
    </COEFFICIENT>
  </AXIS>
  <AXIS NAME="PITCH">
    <COEFFICIENT NAME="Cmalpha" TYPE="VALUE">
       Pitch_moment_due_to_alpha
       aero/qbar-psf|metrics/Sw-sqft|metrics/cbarw-ft|aero/alpha-rad
       -0.4
    </COEFFICIENT>
    <COEFFICIENT NAME="Cmde" TYPE="VECTOR">
       Pitch_moment_due_to_elevator
       2
       velocities/mach-norm
       aero/qbar-psf|metrics/Sw-sqft|metrics/cbarw-ft|fcs/elevator-pos-rad
       0.0       -1
       2.0       -0.250
    </COEFFICIENT>
    <COEFFICIENT NAME="Cmq" TYPE="VALUE">
       Pitch_moment_due_to_pitch_rate
       aero/qbar-psf|metrics/Sw-sqft|metrics/cbarw-ft|aero/ci2vel|velocities/q-aero-rad_sec
       -22
    </COEFFICIENT>
    <COEFFICIENT NAME="Cmadot" TYPE="VALUE">
       Pitch_moment_due_to_alpha_rate
       aero/qbar-psf|metrics/Sw-sqft|metrics/cbarw-ft|aero/ci2vel|aero/alphadot-rad_sec
       -8
    </COEFFICIENT>
  </AXIS>
  <AXIS NAME="YAW">
    <COEFFICIENT NAME="Cnb" TYPE="VALUE">
       Yaw_moment_due_to_beta
       aero/qbar-psf|metrics/Sw-sqft|metrics/bw-ft|aero/beta-rad
<!--       0.12
 -->
       0.12
    </COEFFICIENT>
    <COEFFICIENT NAME="Cnr" TYPE="VALUE">
       Yaw_moment_due_to_yaw_rate
       aero/qbar-psf|metrics/Sw-sqft|metrics/bw-ft|aero/bi2vel|velocities/r-aero-rad_sec
<!--       -0.15
 -->
       -0.10
    </COEFFICIENT>
    <COEFFICIENT NAME="Cndr" TYPE="VALUE">
       Yaw_moment_due_to_rudder
       aero/qbar-psf|metrics/Sw-sqft|metrics/bw-ft|fcs/rudder-pos-rad
<!--       -0.1
  -->
       -0.03
    </COEFFICIENT>
    <COEFFICIENT NAME="Cnda" TYPE="VALUE">
       Adverse_yaw
       aero/qbar-psf|metrics/Sw-sqft|metrics/bw-ft|fcs/left-aileron-pos-rad
<!--       -0.01
 -->
       -0.008
    </COEFFICIENT>
  </AXIS>
 </AERODYNAMICS>
</FDM_CONFIG>
